n := 10
i := 1, 2 .. 2*n
x[i] := 2*π*i/(2*n + 1)
x = [0; 0.299199; 0.598399; 0.897598; 1.1968; 1.496; 1.7952; 2.0944; 2.39359; 2.69279; 2.99199; 3.29119; 3.59039; 3.88959; 4.18879; 4.48799; 4.78719; 5.08639; 5.38559; 5.68479; 5.98399]
y := [1.00; 1.803; 3.085; 4.776; 6.434; 7.347; 7.027; 5.652; 3.897; 2.381; 1.347; 0.722; 0.419; 0.256; 0.176; 0.142; 0.136; 0.155; 0.209; 0.324; 0.554]
scale := 100
j := 0 .. scale
t[j] := min(x) + j*(max(x) - min(x))/scale
# Интерполяция кубическим сплайном
fintl(t) := linterp(x, y, t)
s := cspline(x, y)
# Интерполяция кусочно-линейная
fints(t) := interp(s, x, y, t)
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