# Первый способ
A := [1.84, 2.25, 2.53; 2.32, 2.60, 2.82; 1.83, 2.06, 2.24]
B := [-6.09; -6.98; -5.52]
X := A^-1*B = [5.38832; -17.8282; 9.52921]
# Второй способ
Given
x[0] := 0
x[1] := 0
x[2] := 0
1.84*x[0] + 2.25*x[1] + 2.53*x[2] == -6.09
2.32*x[0] + 2.60*x[1] + 2.82*x[2] == -6.98
1.83*x[0] + 2.06*x[1] + 2.24*x[2] == -5.52
res := Find(x)
res = [5.38832; -17.8282; 9.52921]
# Третий способ
a := [1.84, 2.25, 2.53; 2.32, 2.60, 2.82; 1.83, 2.06, 2.24]
b := [-6.09; -6.98; -5.52]
lsolve(A, B) = [5.38832; -17.8282; 9.52921]
